// SBML level 2 version 3

model temp()

  // Compartments:
  compartment cell = 1;

  // Species:
  species LDLR_la3_la4_la5_la7_loc_surface in cell = LDLR_init; LDLR_la3_la4_la5_la7_loc_surface is "LDLR(la3,la4,la5,la7,loc~surface)";
  species LDL_ldlr_loc_extra in cell = LDL_conc; LDL_ldlr_loc_extra is "LDL(ldlr,loc~extra)";
  species S3 in cell = 0; S3 is "LDL(ldlr!1,loc~extra).LDLR(la3!1,la4,la5,la7,loc~surface)";
  species S4 in cell = 0; S4 is "LDL(ldlr!1,loc~extra).LDLR(la3,la4!1,la5,la7,loc~surface)";
  species S5 in cell = 0; S5 is "LDL(ldlr!1,loc~extra).LDLR(la3,la4,la5!1,la7,loc~surface)";
  species S6 in cell = 0; S6 is "LDL(ldlr!1,loc~extra).LDLR(la3,la4,la5,la7!1,loc~surface)";
  species S7 in cell = 0; S7 is "LDL(ldlr!1,loc~endo).LDLR(la3!1,la4,la5,la7,loc~endosome)";
  species S8 in cell = 0; S8 is "LDL(ldlr!1,loc~endo).LDLR(la3,la4!1,la5,la7,loc~endosome)";
  species S9 in cell = 0; S9 is "LDL(ldlr!1,loc~endo).LDLR(la3,la4,la5!1,la7,loc~endosome)";
  species S10 in cell = 0; S10 is "LDL(ldlr!1,loc~endo).LDLR(la3,la4,la5,la7!1,loc~endosome)";
  species S11 in cell = 0; S11 is "LDLR(la3,la4,la5,la7,loc~endosome)";
  species LDL_ldlr_loc_endo in cell = 0; LDL_ldlr_loc_endo is "LDL(ldlr,loc~endo)";
  species LDL_ldlr_loc_lyso in cell = 0; LDL_ldlr_loc_lyso is "LDL(ldlr,loc~lyso)";

  // Parameters:
  k_on_base = 1;
  k_off_surf = 1;
  k_off_endo = 50;
  k_endo = 2;
  strength_LA3 = 1;
  strength_LA4 = 1;
  strength_LA5 = 1;
  strength_LA7 = 0.8;
  k_recycle_ldlr = 3;
  k_lyso_ldl = 3;
  k_degrade_ldl = 5;
  LDLR_init = 1000;
  LDL_conc = 100;

  // Assignment rules:
  LDLR_surface := LDLR_la3_la4_la5_la7_loc_surface + S3 + S4 + S5 + S6;
  LDLR_endosome := S7 + S8 + S9 + S10 + S11;
  LDL_free := 0 + LDL_ldlr_loc_extra;
  LDL_endo := 0 + LDL_ldlr_loc_endo;
  LDL_lyso := 0 + LDL_ldlr_loc_lyso;
  Surf_LA3 := 0 + S3;
  Surf_LA4 := 0 + S4;
  Surf_LA5 := 0 + S5;
  Surf_LA7 := 0 + S6;
  k_on_LA3 := k_on_base*strength_LA3;
  k_on_LA4 := k_on_base*strength_LA4;
  k_on_LA5 := k_on_base*strength_LA5;
  k_on_LA7 := k_on_base*strength_LA7;

  // Reactions:
  R1: LDLR_la3_la4_la5_la7_loc_surface + LDL_ldlr_loc_extra => LDL_ldlr_loc_extra + S3; k_on_LA3*LDLR_la3_la4_la5_la7_loc_surface*LDL_ldlr_loc_extra;
  R2: LDLR_la3_la4_la5_la7_loc_surface + LDL_ldlr_loc_extra => LDL_ldlr_loc_extra + S4; k_on_LA4*LDLR_la3_la4_la5_la7_loc_surface*LDL_ldlr_loc_extra;
  R3: LDLR_la3_la4_la5_la7_loc_surface + LDL_ldlr_loc_extra => LDL_ldlr_loc_extra + S5; k_on_LA5*LDLR_la3_la4_la5_la7_loc_surface*LDL_ldlr_loc_extra;
  R4: LDLR_la3_la4_la5_la7_loc_surface + LDL_ldlr_loc_extra => LDL_ldlr_loc_extra + S6; k_on_LA7*LDLR_la3_la4_la5_la7_loc_surface*LDL_ldlr_loc_extra;
  R5: S3 => LDLR_la3_la4_la5_la7_loc_surface; k_off_surf*S3;
  R6: S4 => LDLR_la3_la4_la5_la7_loc_surface; k_off_surf*S4;
  R7: S5 => LDLR_la3_la4_la5_la7_loc_surface; k_off_surf*S5;
  R8: S6 => LDLR_la3_la4_la5_la7_loc_surface; k_off_surf*S6;
  R9: S3 => S7; k_endo*S3;
  R10: S4 => S8; k_endo*S4;
  R11: S5 => S9; k_endo*S5;
  R12: S6 => S10; k_endo*S6;
  R13: S7 => S11 + LDL_ldlr_loc_endo; k_off_endo*S7;
  R14: S8 => S11 + LDL_ldlr_loc_endo; k_off_endo*S8;
  R15: S9 => S11 + LDL_ldlr_loc_endo; k_off_endo*S9;
  R16: S10 => S11 + LDL_ldlr_loc_endo; k_off_endo*S10;
  R17: S11 => LDLR_la3_la4_la5_la7_loc_surface; k_recycle_ldlr*S11;
  R18: LDL_ldlr_loc_endo => LDL_ldlr_loc_lyso; k_lyso_ldl*LDL_ldlr_loc_endo;
  R19: LDL_ldlr_loc_lyso => ; k_degrade_ldl*LDL_ldlr_loc_lyso;

  // Unit definitions:
  unit substance = item;
end
